OpenVSP model (file version 5), 7 components.
Geometry view with OpenVSP parameter names; values to 6 digits, angles in degrees, lengths in the model's unit.
Overall bounding box: X_Min=-0.978261 X_Len=27.7702 Y_Min=-18.6574 Y_Len=37.3148 Z_Min=-4.49274 Z_Len=12.5501

Fuselage "Fuselage"
  location (X Y Z) 0 0 0, rotation 0 0 0
  bounding box size 24.58 4.00943 5.80985
  Design: Length=24.58
  cross sections:
    n   XLocPercent  YLocPercent  ZLocPercent   shape
    0   0            0            0             ellipse Ellipse_Height=2 Ellipse_Width=2
    1   0.0357126    0            -0.0102389    ellipse Ellipse_Height=2.3201 Ellipse_Width=3.4
    2   0.0744863    0            -0.022062     ellipse Ellipse_Height=3.15685 Ellipse_Width=3.5
    3   0.148973     0            -0.022062     ellipse Ellipse_Height=3.82345 Ellipse_Width=3.7
    4   0.205479     0            -0.000905034  ellipse Ellipse_Height=4.5608 Ellipse_Width=3.8
    5   0.261986     0            0.02611       ellipse Ellipse_Height=5.4281 Ellipse_Width=3.85
    6   0.397295     0            0.0288064     ellipse Ellipse_Height=5.06345 Ellipse_Width=3.3
    7   0.5          0            0.0153059     ellipse Ellipse_Height=3.77926 Ellipse_Width=3
    8   0.601884     0            0.0119163     ellipse Ellipse_Height=2.82762 Ellipse_Width=2.5
    9   0.75         0            0.02544       ellipse Ellipse_Height=2.00863 Ellipse_Width=2
    10  0.875        0            0.0363069     ellipse Ellipse_Height=1.38875 Ellipse_Width=1.5
    11  0.940068     0            0.0416105     ellipse Ellipse_Height=1.12338 Ellipse_Width=1
    12  0.970034     0            0.044199      ellipse Ellipse_Height=0.832362 Ellipse_Width=0.75
    13  1            0            0.0580205     point

Wing "MainWing"
  location (X Y Z) 6.39344 0 3.19672, rotation 0 0 0
  symmetric about XZ
  bounding box size 5.525 37.3148 1.37116
  totals: TotalSpan=36.748 TotalProjectedSpan=36.7256 TotalChord=4.5125 TotalArea=165.825 TotalAR=8.13368 MAC=4.58823
  root: chord 5.525, twist 0, NACA 4-series Camber=0 CamberLoc=0.2 ThickChord=0.1
  sections:
    n  Span    Root_Chord  Tip_Chord  Area     Sweep  Sweep_Location  Dihedral  Twist  Twist_Location  tip airfoil
    1  18.374  5.525       3.5        82.9127  0      0               2         0      0.25            as above

Wing "Tail"
  location (X Y Z) 20.2459 0 1.55738, rotation 0 0 0
  symmetric about XZ
  bounding box size 4.379 12.99 0.438154
  totals: TotalSpan=12.99 TotalProjectedSpan=12.99 TotalChord=3.4975 TotalArea=45.4325 TotalAR=3.71408 MAC=3.57156
  root: chord 4.379, twist 0, NACA 4-series Camber=0 CamberLoc=0.2 ThickChord=0.1
  sections:
    n  Span   Root_Chord  Tip_Chord  Area     Sweep  Sweep_Location  Dihedral  Twist  Twist_Location  tip airfoil
    1  6.495  4.379       2.616      22.7163  7.5    0               0         0      0.25            as above

Wing "Rudder"
  location (X Y Z) 20.2869 0 1.55738, rotation 90 0 0
  bounding box size 6.50501 0.416909 6.5
  totals: TotalSpan=6.5 TotalProjectedSpan=6.5 TotalChord=2.75992 TotalArea=17.9395 TotalAR=2.35514 MAC=2.99893
  root: chord 4.16667, twist 0, NACA 4-series Camber=0 CamberLoc=0.2 ThickChord=0.1
  sections:
    n  Span  Root_Chord  Tip_Chord  Area     Sweep  Sweep_Location  Dihedral  Twist  Twist_Location  tip airfoil
    1  6.5   4.16667     1.35317    17.9395  38.4   0               0         0      0.25            as above

Wing "Rudder", child of "Rudder"
  location (X Y Z) 16.9672 0 1.55738, rotation 90 0 0
  bounding box size 7.71229 0.511871 1.75
  totals: TotalSpan=1.75 TotalProjectedSpan=1.75 TotalChord=3.88691 TotalArea=6.8021 TotalAR=0.450229 MAC=4.01641
  root: chord 5.11574, twist 0, NACA 4-series Camber=0 CamberLoc=0.2 ThickChord=0.1
  sections:
    n  Span  Root_Chord  Tip_Chord  Area    Sweep    Sweep_Location  Dihedral  Twist  Twist_Location  tip airfoil
    1  1.75  5.11574     2.65808    6.8021  70.9018  0               0         0      0.25            as above

Propeller "Propeller"
  location (X Y Z) 0 0 0, rotation 0 0 0
  bounding box size 0.500589 7.8527 8.98548
  Design: Diameter=10 NumBlade=3 Beta34=20 UseBeta34Flag=1 Feather=0 Rotate=0 Precone=0 ReverseFlag=0 FoldAngle=0 PropMode=0 AF=148.919 CLi=0.524046 Chord=0.177656 Solidity=0.169649 ConstructXoC=0.5 FeatherAxisXoC=0.5 FeatherOffsetXoC=0
  cross sections:
    n  RadiusFrac  shape
    0  0.2         circle Circle_Diameter=0.4
    1  0.400001    NACA 16-series Chord=0.831252 IdealCl=0.7 ThickChord=0.200037
    2  1           NACA 16-series Chord=0.65 IdealCl=0.2 ThickChord=0.03
  Chord along r/R (cubic Bezier): 0.2: 0.08, 0.333333: 0.15, 0.466667: 0.2, 0.6: 0.2, 0.716667: 0.2, 0.833333: 0.2, 0.95: 0.2, 0.966667: 0.2, 0.983333: 0.2, 1: 0.13
  Twist along r/R (PCHIP): 0.2: 46.75, 0.75: 20, 1: 13
  Thick along r/R (cubic Bezier): 0.2: 0.5, 0.2667: 0.3, 0.3334: 0.225, 0.4001: 0.2, 0.466733: 0.125, 0.533367: 0.115, 0.6: 0.1, 0.733333: 0.075, 0.866667: 0.055, 1: 0.03
  CLI along r/R (cubic Bezier): 0.2: 0, 0.2667: 0.7, 0.3334: 0.7, 0.4001: 0.7, 0.466733: 0.7, 0.533367: 0.7, 0.6: 0.7, 0.733333: 0.7, 0.866667: 0.7, 1: 0.2

Ellipsoid "EllipsoidGeom"
  location (X Y Z) -0.978261 0 0, rotation 0 0 0
  bounding box size 2.14815 2.14815 2.14815
  Design: A_Radius=1.07407 B_Radius=1.07407 C_Radius=1.07407

VSPAERO settings (reference component "MainWing"): Sref=165.825 bref=36.748 cref=4.5125 Xcg=0 Ycg=0 Zcg=0 AlphaStart=0 AlphaEnd=5 AlphaNpts=2 BetaStart=0 BetaEnd=0 BetaNpts=1 MachStart=0 MachEnd=0 MachNpts=1 ReCref=1e+07 Vinf=100 Rho=0.002377
